<Lems>

    <!--

        This LEMS file has been automatically generated using PyNeuroML v1.3.14 (libNeuroML v0.6.6)

     -->

    <!-- Specify which component to run -->
    <Target component="Worm2D" reportFile="report.txt"/>

    <!-- Include core NeuroML2 ComponentType definitions -->
    <Include file="Cells.xml"/>
    <Include file="Networks.xml"/>
    <Include file="Simulation.xml"/>

    <Include file="testnet.nml"/>

    <Simulation id="Worm2D" length="500.0ms" step="0.05ms" target="Worm2DNet" seed="12345">  <!-- Note seed: ensures same random numbers used every run -->
        <Display id="display0" title="Voltages" timeScale="1ms" xmin="-50.0" xmax="550.0" ymin="-90" ymax="50">
            <Line id="v" quantity="AllCells[0]/v" scale="1mV" color="#ffffff" timeScale="1ms"/>
        </Display>

        <OutputFile id="Volts_file" fileName="Worm2D.v.dat">
            <OutputColumn id="v" quantity="AllCells[0]/v"/>
        </OutputFile>

    </Simulation>

</Lems>
